Lunit = 1.00 m
Munit = 1.00 kg
Tunit = 1.00 s

g = 9.81
rho = 1.225

15692.73 4.16 1.38 0.25 0 0 0
15692.73 4.16 -1.38 0.25 0 0 0
7869.93 5.97 4.88 0.87 0 0 0
7869.93 5.97 -4.88 0.87 0 0 0
4153.96 8.06 7.96 1.41 0 0 0
4153.96 8.06 -7.96 1.41 0 0 0
1200.03 11.49 11.40 2.01 0 0 0
1200.03 11.49 -11.40 2.01 0 0 0
578.67 14.43 14.79 2.61 0 0 0
578.67 14.43 -14.79 2.61 0 0 0
300.01 15.82 18.07 3.19 0 0 0
300.01 15.82 -18.07 3.19 0 0 0

59059.40 9.11 8.15 1.43 0 0 0
59059.40 9.11 -8.15 1.43 0 0 0
17061.60 12.13 11.55 2.07 0 0 0
17061.60 12.13 -11.55 2.07 0 0 0
8227.33 14.83 14.92 2.66 0 0 0
8227.33 14.83 -14.92 2.66 0 0 0
4265.40 16.10 18.22 3.26 0 0 0
4265.40 16.10 -18.22 3.26 0 0 0

59059.40 9.11 8.15 1.43 0 0 0
59059.40 9.11 -8.15 1.43 0 0 0
17061.60 12.13 11.55 2.07 0 0 0
17061.60 12.13 -11.55 2.07 0 0 0
8227.33 14.83 14.92 2.66 0 0 0
8227.33 14.83 -14.92 2.66 0 0 0
4265.40 16.10 18.22 3.26 0 0 0
4265.40 16.10 -18.22 3.26 0 0 0
